*Heading
** Job name: umat Model name: umat
** Generated by: Abaqus/CAE 2018
*Preprint, echo=NO, model=NO, history=NO, contact=NO
**
** PARTS
**
*Part, name=RUM2_Ub4
*Node
      1,          10.,          10.,          50.
      2,          10.,          7.5,          50.
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*Element, type=C3D8
  1, 106, 107, 112, 111,   1,   2,   7,   6
  2, 107, 108, 113, 112,   2,   3,   8,   7
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*Nset, nset=Set-1, generate
   1,  525,    1
*Elset, elset=Set-1, generate
   1,  320,    1
** Section: Stahl
*Solid Section, elset=Set-1, material=Stahl
,
*End Part
**
**
** ASSEMBLY
**
*Assembly, name=Assembly
**
*Instance, name=RUM2_Ub4-1, part=RUM2_Ub4
*End Instance
**
*Nset, nset=Set-1, instance=RUM2_Ub4-1
   1,   2,   3,   4,   5, 106
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*Elset, elset=Set-1, instance=RUM2_Ub4-1
   1,   2,   3,   4,  81,  82,  83,  84, 161, 162, 163, 164, 241, 242, 243, 244
*Nset, nset=Set-2, instance=RUM2_Ub4-1
   1,   2,   3,   4,   5, 106
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*Elset, elset=Set-2, instance=RUM2_Ub4-1
   1,   2,   3,   4,  81,  82,  83,  84, 161, 162, 163, 164, 241, 242, 243, 244
*Nset, nset=Set-3, instance=RUM2_Ub4-1
 5,
*Elset, elset=_Surf-1_S5, internal, instance=RUM2_Ub4-1
  77,  78,  79,  80, 157, 158, 159, 160, 237, 238, 239, 240, 317, 318, 319, 320
*Surface, type=ELEMENT, name=Surf-1
_Surf-1_S5, S5
*End Assembly
**
** MATERIALS
**
*Material, name=Stahl
*Depvar
      2,
*User Material, constants=2
210000., 0.3
**
** BOUNDARY CONDITIONS
**
** Name: Fest Type: Displacement/Rotation
*Boundary
Set-2, 3, 3
** Name: Rotation Type: Displacement/Rotation
*Boundary
Set-3, 1, 1
Set-3, 2, 2
Set-3, 4, 4
Set-3, 5, 5
Set-3, 6, 6
** ----------------------------------------------------------------
**
** STEP: Step-1
**
*Step, name=Step-1, nlgeom=NO
*Static
1., 1., 1e-05, 1.
**
** LOADS
**
** Name: Fest   Type: Surface traction
*Dsload
Surf-1, TRVEC, 1000., 0., 0., -1.
**
** OUTPUT REQUESTS
**
*Restart, write, frequency=0
**
** FIELD OUTPUT: F-Output-1
**
*Output, field
*Node Output
U,
*Element Output, directions=YES
E, EE, EEQUT, LE, MISES, MVF, PE, PEEQ, PEMAG, S, SEQUT, TE, TEEQ, TEVOL
**
** HISTORY OUTPUT: H-Output-1
**
*Output, history, variable=PRESELECT
*End Step
